# Opgave 1
H(s) := (s + ω1)/(s + ω2)  # error: This variable is undefined. Check that the label is set correctly.
H(z) := H(s) substitute, s == 2/Ts*(1 - z^-1)/(1 + z^-1) → (2*z + ω1*Ts + ω1*z*Ts - 2)/(2*z + ω2*Ts + ω2*z*Ts - 2)
# Opgave 2
H(z) substitute, ω1 == 565, ω2 == 942, Ts == 0.001 → (2565.0*z - 1435.0)/(2942.0*z - 1058.0)
a1*y(n) + a2*y(n - 1) + b1*x(n) + b2*x(n - 1) .. .
# Opgave 5
y(n) := 1058/2942*y(n - 1) + 2565/2942*x(n) - 1435/2942*x(n - 1) float, 2 → 0.87*x(n) + (-0.49*x(n - 1)) + 0.36*y(n - 1)
y1(n) := 2942*y1(n) - 1058*y1(n - 1) + 2565*x1(n) - 1435*x1(n - 1) float, 2; simplify → 2565.0*x1(n) + 2942.0*y1(n) + (-1430.0*x1(n - 1)) + (-1058.0*y1(n - 1))
